# OpenSim document version 40000
AnalyzeTool Moco:
  model_file: ..\..\OpenSim\In\Models\RTSA_Adjusted\FSModel_GHJoint_Z88ity846pc.osim
  replace_force_set: false
  results_directory: ..\..\OpenSim\Out\Moco\Analysis\sim_Z88ity846pc\
  output_precision: 8
  initial_time: 0
  final_time: 1.180585
  solve_for_equilibrium_for_auxiliary_states: true
  maximum_number_of_integrator_steps: 20000
  maximum_integrator_step_size: 1
  minimum_integrator_step_size: 1e-8
  integrator_error_tolerance: 1e-5
  states_file: ../../OpenSim/Out/Moco/Analysis/sim_Z88ity846pc/MocoSol_LateralReach.sto
  lowpass_cutoff_frequency_for_coordinates: -1
  AnalysisSet Analyses:
    JointReaction: start_time=0 end_time=1.180585 step_interval=1 in_degrees=true joint_names=unrothum
        apply_on_bodies=parent express_in_frame=/jointset/unrothum/scapula_offset/
    ForceReporter: start_time=0 end_time=1.180585 step_interval=1 in_degrees=true include_constraint_forces=false
    MuscleAnalysis: start_time=0 end_time=1.180585 step_interval=1 in_degrees=true muscle_list=(DELT1 DELT2 DELT3)
        moment_arm_coordinate_list=(elv_angle shoulder_elv shoulder_rot) compute_moments=true
